*Heading
** Job name: Moron2 Model name: Prep1F
** Generated by: Abaqus/CAE 2017
*Preprint, echo=NO, model=NO, history=NO, contact=NO
** ----------------------------------------------------------------
**
** PART INSTANCE: BLANKINST
**
*Node
      1,           0., 0.00999999978
      2,           1., 0.00999999978
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*Element, type=CPS4
  1,   1,   2,  18,  17
  2,   2,   3,  19,  18
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** ----------------------------------------------------------------
**
** PART INSTANCE: Part-4-1
**
*Node
    497,          15., 0.00899999961
    498,          14., 0.00899999961
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*Element, type=CPS4R
451, 497, 498, 514, 513
452, 498, 499, 515, 514
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** ----------------------------------------------------------------
**
** PART INSTANCE: Part-4-Copy-1
**
*Node
    529,           0.,   29.7399998
    530,           1.,   29.7399998
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*Element, type=CPS4R
466, 529, 530, 546, 545
467, 530, 531, 547, 546
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*System
*Elset, elset=BlockEl, generate
   1,  450,    1
*Nset, nset=Bot, generate
  1,  15,   1
*Nset, nset=BotDieAll, generate
497, 528,   1
*Nset, nset=BotDieSurf, generate
497, 512,   1
*Elset, elset=BotEl, generate
451, 465,   1
*Nset, nset=Left, generate
   1,  481,   16
*Nset, nset=Right, generate
  16,  496,   16
*Nset, nset=Set1, generate
  1,  14,   1
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*Elset, elset=TopEl, generate
466, 480,   1
*Nset, nset=Touch, generate
  1,  15,   1
**
** MATERIALS
**
*Material, name=STEEL
*Elastic
207000., 0.3
*Plastic
 400.,    0.
 680., 0.015
 710., 0.032
 715., 0.109
 785., 0.214
 865.,  0.39
 915.,  0.55
1250.,  2.05
